# ---------- 1. Initialize simulation ----------
units metal
atom_style atomic
dimension 3
boundary p p p
read_data /home/modeler/RemLabs/Project/Li_diffusion_constant_T=600/20201201-112010/lammps.data

pair_style meam/c
pair_coeff * * library.meam Li Si LiSi.meam Li Si

velocity all create 600 3320 dist gaussian

# ---------- 2. Describe computed properties----------
compute msdall all msd
thermo_style custom step pe ke etotal temp press density c_msdall[4]
thermo 100

# ---------- 3. Specify ensemble  ----------
#fix  1 all nvt temp 600 600 0.25
fix 1 all npt temp 600 600 0.25 tchain 2 iso 1.0 1.0 1.0 pchain 2

# ---------- 4. Run -------------
timestep 0.005
run 1000
